# Задание 2
x2(t2) := 6*sin(2*t2)^2 + 5
y2(t2) := 8 - 3*cos(2*t2)
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x == 6*sin(2*t)^2 + 5
x - 5 == 6*sin(2*t)^2
(x - 5)/6 == sin(2*t)^2
sqrt((x - 5)/6) == sin(2*t)
asin(sqrt((x - 5)/6)) == 2*t
y2_1(x2) := 8 - 3*cos(2*asin(sqrt((x2 - 5)/6))/2)
y2_2(x2) := 8 + 3*cos(2*asin(sqrt((x2 - 5)/6))/2)
t == asin(sqrt((x - 5)/6))/2
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# Задание 3
# Гипербола
x32 := 4
y32 := 5
a32 := 12
b32 := 9
# Эллипс
x31 := 5
y31 := 8
a31 := 4
b31 := 7
# Парабола
x33 := 19
y33 := 4
p33 := 15
x33_p(t) := (t^2 + 19)/(2*p33)
(x - x32)^2/a32^2 - (y - y32)^2/b32^2 == 1 solve, y → [3*sqrt(x + 8)*sqrt(x - 16)/4 + 5; 5 - 3*sqrt(x + 8)*sqrt(x - 16)/4]
x33_3(y) := ((y33 - y)^2 + 2*x33*p33)/(2*p33)
(x - x31)^2/a31^2 + (y - y31)^2/b31^2 == 1 solve, y → [8 + 7i*sqrt(x - 1)*sqrt(x - 9)/4; 8 - 7i*sqrt(x - 1)*sqrt(x - 9)/4]
y33_p(t) := t + 4
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x32_p(t) := a32/2*(t + 1/t) + x32
y32_1(x) := 3*sqrt(x + 8)*sqrt(x - 16)/4 + 5
x31_p(t) := a31*cos(t) + x31
y31_1(x) := 8 + 7i*sqrt(x - 1)*sqrt(x - 9)/4
y32_p(t) := b32/a32*(t - 1/t) + y32
y31_p(t) := b31*sin(t) + y31
y32_2(x) := 5 - 3*sqrt(x + 8)*sqrt(x - 16)/4
y31_2(x) := 8 - 7i*sqrt(x - 1)*sqrt(x - 9)/4
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# Задание 4
# Фигура Лиссажу | Спираль Бернули | Улитка Паскаля | Циклическая кривая - эпициклоида
r42 := 6
ωx4 := 2
ωy4 := 7
r42_1 := 13
a43 := 3
b43 := 4
r44 := 11
r44_1 := 7
r42_f(t) := r42 + r42_1*sqrt(t)
x4_1(t) := cos(ωx4*t)
y4_1(t) := sin(ωy4*t)
p43(t) := a43*cos(t) + b43
xc44(t) := (r44 + r44_1)*sin(t) - r44_1*sin((r44/r44_1 + 1)*t)
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rb42_f(t) := r42 - r42_1*sqrt(t)
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yc44(t) := (r44 + r44_1)*cos(t) + r44_1*sin((r44/r44_1 + 1)*t)
yy44(t) := (r44 + r44_1)*(sin(t)*cos(t))
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# Задание 5
y5(x) := nthroot(2*x^2 + 1, 3) - 8
a5 := -20
y51(x) := d/dx(y5(x))
y51(x) → 4*x*nthroot(2*x^2 + 1, 3)/(6*x^2 + 3)
y51(a5) = -0.309182
k5(x) := y5(a5) + y51(a5)*(x - a5)
n5(x) := y5(a5) - 1/y51(a5)*(x - a5)
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# Задание 6
t6 := 1
f6(t) := 2*t + t^2
y6(t) := 2*t - t^2
a6 := f6(t6) = 3
y6(t6) = 1
f61(t) := d/dt(f6(t)) → 2*t + 2
y61(t) := d/dt(y6(t)) → 2 - 2*t
k6(x) := y6(t6) + (x - a6)*y61(t6)/f61(t6)
n6(x) := y6(t6) - f61(t6)/y61(t6)*(x - a6)
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# Задание 7
# Прямая | Эллипс | Гипербола | Парабола
x72 := 20
y72 := 9
a72 := 14
b72 := 3
x73 := 7
y73 := 16
a73 := 3
b73 := 8
x74 := 12
y74 := 10
p74 := 7
A7 := [-18; -16]
B7 := [13; 14]
(y - y74)^2 == 2*p74*(x - x74) solve, y → [sqrt(14)*sqrt(x - 12) + 10; 10 - sqrt(14)*sqrt(x - 12)]
(x - x72)^2/a72^2 + (y - y72)^2/b72^2 == 1 solve, y → [9 + 3i*sqrt(x - 6)*sqrt(x - 34)/14; 9 - 3i*sqrt(x - 6)*sqrt(x - 34)/14]
(x - x73)^2/a73^2 - (y - y73)^2/b73^2 == 1 solve, y → [8*sqrt(x - 4)*sqrt(x - 10)/3 + 16; 16 - 8*sqrt(x - 4)*sqrt(x - 10)/3]
(x - A7[0])/(B7[0] - A7[0]) == (y - A7[1])/(B7[1] - A7[1]) solve, y → 30*x/31 + 44/31
y74_1(x) := sqrt(14)*sqrt(x - 12) + 10
y74_2(x) := 10 - sqrt(14)*sqrt(x - 12)
y77(x) := 30*x/31 + 44/31
y72_1(x) := 9 + 3i*sqrt(x - 6)*sqrt(x - 34)/14
y72_2(x) := 9 - 3i*sqrt(x - 6)*sqrt(x - 34)/14
y73_1(x) := 8*sqrt(x - 4)*sqrt(x - 10)/3 + 16
y73_2(x) := 16 - 8*sqrt(x - 4)*sqrt(x - 10)/3
x72_p(t) := a72*cos(t) + x72
y72_p(t) := b72*sin(t) + y72
f71(x) := y77(x) - y73_1(x)
f72(x) := y77(x) - y72_1(x)
f75(x) := y77(x) - y74_1(x)
f73(x) := y77(x) - y72_2(x)
f74(x) := y77(x) - y73_2(x)
x71 := 3
x74 := 8
x72 := 7
x73 := 8
x75 := 14
x76 := 18
H1 := root(f71(x71), x71) = 1.11478
H2 := root(f72(x72), x72) = 6.80026
H5 := root(f75(x75), x75) = 13.3365
H4 := root(f74(x74), x74) = 10.4382
H3 := root(f73(x73), x73) = 10.0037
H6 := root(f75(x76), x76) = 19.3457
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# Задание 8
y81(x) := 12*x - x^3
R := [0; 0; 4]
(x - R[0])^2/R[2]^2 + (y - R[1])^2/R[2]^2 == 1 solve, y → [sqrt(x - 4)*sqrt(x + 4)*1i; -sqrt(x - 4)*sqrt(x + 4)*1i]
okr1(x) := sqrt(x - 4)*sqrt(x + 4)*1i
okr2(x) := -sqrt(x - 4)*sqrt(x + 4)*1i
x81 := root(y81(x) - okr2(x), x, -3, 1) = 0.335302
x84 := root(y81(x) - okr1(x), x, -3, 1) = -0.335302
x82 := root(y81(x) - okr2(x), x, -4, 0) = -3.53929
x85 := root(y81(x) - okr1(x), x, -3, -4) = -3.37061
x83 := root(y81(x) - okr2(x), x, 4, 1) = 3.37061
x86 := root(y81(x) - okr1(x), x, 4, 1) = 3.53929
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# Задание 9
O1 := [10; 12; 10]
O2 := [10; 6; 7]
rad := 12
y91_1(x) := O1[1] + sqrt(O1[2]^2 - (x - O1[0])^2)
y92_1(x) := O2[1] + sqrt(O2[2]^2 - (x - O2[0])^2)
y91_v1(x) := O1[1] + sqrt((O1[2] + rad)^2 - (x - O1[0])^2)
y92_v1(x) := O2[1] + sqrt((O2[2] + rad)^2 - (x - O2[0])^2)
y91_2(x) := O1[1] - sqrt(O1[2]^2 - (x - O1[0])^2)
y92_2(x) := O2[1] - sqrt(O2[2]^2 - (x - O2[0])^2)
y91_v2(x) := O1[1] - sqrt((O1[2] + rad)^2 - (x - O1[0])^2)
y92_v2(x) := O2[1] - sqrt((O2[2] + rad)^2 - (x - O2[0])^2)
Tpx1 := root(y91_v2(x) - y92_v2(x), x, -10, 0) = -7.56239
Tp := [Tpx1; y91_v2(Tpx1)] = [-7.56239; -1.25]
y9_sm(x) := Tp[1] + sqrt(rad^2 - (x - Tp[0])^2)
y91_v2(Tpx1) = -1.25
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O1 = [10; 12; 10]
O2 = [10; 6; 7]
rad = 12
y91_v1(x) := O1[1] + sqrt((rad - O1[2])^2 - (x - O1[0])^2)
y92_v1(x) := O2[1] + sqrt((rad - O2[2])^2 - (x - O2[0])^2)
y91_v2(x) := O1[1] - sqrt((rad - O1[2])^2 - (x - O1[0])^2)
y92_v2(x) := O2[1] - sqrt((rad - O2[2])^2 - (x - O2[0])^2)
Tpx1 := root(y91_v2(x) - y92_v1(x), x, 7, 10) = 8.43875
Tp := [Tpx1; y91_v2(Tpx1)] = [8.43875; 10.75]
y9_sm1(x) := Tp[1] + sqrt(rad^2 - (x - Tp[0])^2)
y91_v2(Tpx1) = 10.75
y9_sm2(x) := Tp[1] - sqrt(rad^2 - (x - Tp[0])^2)
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