# Задание 2
m := 11
n := 22
i := m, m + 1 .. n
x[i] := i*3/11
y[i] := x[i]*e^(-x[i]/2)
y2(t) := t*e^(-t/2)
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# Задание 3
Lagr(t) := y[m]*product((t - x[j])/(x[m] - x[j]), j = m + 1 .. n) + y[n]*product((t - x[j])/(x[n] - x[j]), j = m .. n - 1) + sum((y[i]*product((t - x[j])/(x[i] - x[j]), j = m .. i - 1))*product((t - x[j])/(x[i] - x[j]), j = i + 1 .. n), i = m + 1 .. n - 1)
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# Задание 4
r4 := 14
r4_1 := 7
xc4(t) := (r4 + r4_1)*sin(t) - r4_1*sin((r4/r4_1 + 1)*t)
yc4(t) := (r4 + r4_1)*cos(t) + (-r4_1*cos((r4/r4_1 + 1)*t))
m := 0
n := 20
i := m .. n
j := i
x4[i] := (r4 + r4_1)*sin(i) - r4_1*sin((r4/r4_1 + 1)*i)
y4[i] := (r4 + r4_1)*cos(i) - r4_1*cos((r4/r4_1 + 1)*i)
Lagr4(t) := y4[m]*product((t - x4[j])/(x4[m] - x4[j]), j = m + 1 .. n) + y4[n]*product((t - x4[j])/(x4[n] - x4[j]), j = m .. n - 1) + sum((y4[i]*product((t - x4[j])/(x4[i] - x4[j]), j = m .. i - 1))*product((t - x4[j])/(x4[i] - x4[j]), j = i + 1 .. n), i = m + 1 .. n - 1)
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# Задание 5
N := 11
M := 22
i := N .. M
f(t) := t*e^(-t/2)
p(t) := d/dt(f(t))
X[i] := i*3/11
Y[i] := f(X[i])
pY[i] := p(X[i])
i := N .. M - 1
h[i] := X[i + 1] - X[i]
u(t) :=
    u ← 0
    for i ∈ N .. M - 1
        u ← (t - X[i])/h[i] if X[i] ≤ t < X[i + 1]
    u
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# Пример 6
A := [3; 0.669]
B := [4.091; 0.529]
x[i] = [3; 3.27273; 3.54545; 3.81818; 4.09091; 4.36364; 4.63636; 4.90909; 5.18182; 5.45455; 5.72727]
y[i] = [0.66939; 0.637156; 0.602263; 0.565912; 0.529042; 0.492376; 0.456461; 0.421702; 0.388387; 0.356713; 0.326803]
C := [4.909; 0.422]
D := [5.727; 0.327]
Px3(t) := (1 - t)^3*A[0] + 3*t*(1 - t)^2*B[0] + 3*t^2*(1 - t)*C[0] + t^3*D[0]
Py3(t) := (1 - t)^3*A[1] + 3*t*(1 - t)^2*B[1] + 3*t^2*(1 - t)*C[1] + t^3*D[1]
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# Задание 7
A = [3; 0.669]
B = [4.091; 0.529]
C = [4.909; 0.422]
D = [5.727; 0.327]
a0 := (A[0] + 4*B[0] + C[0])/6
a1 := (-A[0] + C[0])/2
a2 := (A[0] - 2*B[0] + C[0])/2
a3 := (-A[0] + 3*B[0] - 3*C[0] + D[0])/6
b0 := (A[1] + 4*B[1] + C[1])/6
b1 := (-A[1] + C[1])/2
b2 := (A[1] - 2*B[1] + C[1])/2
b3 := (-A[1] + 3*B[1] - 3*C[1] + D[1])/6
x7(t) := a0 + a1*t + a2*t^2 + a3*t^3
y7(t) := b0 + b1*t + b2*t^2 + b3*t^3
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