# Задание 2
A := [1; 13; 2]
B := [13; 2; 5]
C := [2; 5; 12]
D := [5; 12; 8]
E := [12; 8; 18]
F := [8; 18; 15]
X := [C[0], A[0], F[0], E[0], D[0], A[0], B[0], A[0], E[0], F[0], A[0], C[0], A[0], E[0], D[0], B[0], A[0], E[0], D[0], B[0], C[0]]
Y := [C[1], A[1], F[1], E[1], D[1], A[1], B[1], A[1], E[1], F[1], A[1], C[1], A[1], E[1], D[1], B[1], A[1], E[1], D[1], B[1], C[1]]
Matrix := [
    A[0], A[1], A[2], 1;
    B[0], B[1], B[2], 1;
    C[0], C[1], C[2], 1;
    D[0], D[1], D[2], 1;
    E[0], E[1], E[2], 1;
    F[0], F[1], F[2], 1
]
Z := [C[2], A[2], F[2], E[2], D[2], A[2], B[2], A[2], E[2], F[2], A[2], C[2], A[2], E[2], D[2], B[2], A[2], E[2], D[2], B[2], C[2]]
P := [1, 1, 1, 1, 1, 1, 1, 1, 1, 1, 1, 1, 1, 1, 1, 1, 1, 1]
T := transpose([X, Y, Z])
# [component: inputs T]
